θ_A := 30 deg
θ_C := 60 deg
M := 50*9.8068 N
solve block
    # guess values
    F_A := 10 N
    F_C := 10 N
    # constraints
    F_C*cos(θ_C) - F_A*cos(θ_A) == 0
    F_C*sin(θ_C) + F_A*sin(θ_A) - M == 0
    # solver
    [F_Aans; F_Cans] := Find(F_A, F_C) = [245.17; 424.647] N
end solve block
